<Lems>

    <!--

        This LEMS file has been automatically generated using PyNeuroML v0.3.18 (libNeuroML v0.2.47)

     -->

    <!-- Specify which component to run -->
    <Target component="SimExample3" reportFile="report.SimExample3.txt"/>

    <!-- Include core NeuroML2 ComponentType definitions -->
    <Include file="Cells.xml"/>
    <Include file="Networks.xml"/>
    <Include file="Simulation.xml"/>

    <Include file="PyNN.xml"/>
    <Include file="Example3_Network.net.nml"/>
    <Include file="test_files/inputs.nml"/>
    <Include file="test_files/hhcell.cell.nml"/>

    <Simulation id="SimExample3" length="1000.0ms" step="0.025ms" target="Example3_Network" seed="12345">  <!-- Note seed: ensures same random numbers used every run -->

        <Display id="DispPop__pop0" title="Membrane potentials of cells in pop0" timeScale="1ms" xmin="-100.0" xmax="1100.0" ymin="-90" ymax="50">
            <Line id="pop0[0]: v" quantity="pop0/0/hhcell/v" scale="1mV" color="#6aa799" timeScale="1ms"/>
            <Line id="pop0[1]: v" quantity="pop0/1/hhcell/v" scale="1mV" color="#029a72" timeScale="1ms"/>
            <Line id="pop0[2]: v" quantity="pop0/2/hhcell/v" scale="1mV" color="#d340bb" timeScale="1ms"/>
            <Line id="pop0[3]: v" quantity="pop0/3/hhcell/v" scale="1mV" color="#4c73a9" timeScale="1ms"/>
            <Line id="pop0[4]: v" quantity="pop0/4/hhcell/v" scale="1mV" color="#5e503a" timeScale="1ms"/>
        </Display>

        <Display id="DispPop__pop1" title="Membrane potentials of cells in pop1" timeScale="1ms" xmin="-100.0" xmax="1100.0" ymin="-90" ymax="50">
            <Line id="pop1[0]: v" quantity="pop1/0/hhcell/v" scale="1mV" color="#3193ca" timeScale="1ms"/>
            <Line id="pop1[1]: v" quantity="pop1/1/hhcell/v" scale="1mV" color="#90e5e9" timeScale="1ms"/>
            <Line id="pop1[2]: v" quantity="pop1/2/hhcell/v" scale="1mV" color="#29645f" timeScale="1ms"/>
            <Line id="pop1[3]: v" quantity="pop1/3/hhcell/v" scale="1mV" color="#1fcff4" timeScale="1ms"/>
            <Line id="pop1[4]: v" quantity="pop1/4/hhcell/v" scale="1mV" color="#6ed4e9" timeScale="1ms"/>
            <Line id="pop1[5]: v" quantity="pop1/5/hhcell/v" scale="1mV" color="#8fe460" timeScale="1ms"/>
            <Line id="pop1[6]: v" quantity="pop1/6/hhcell/v" scale="1mV" color="#2ca1c7" timeScale="1ms"/>
            <Line id="pop1[7]: v" quantity="pop1/7/hhcell/v" scale="1mV" color="#8d9fe5" timeScale="1ms"/>
            <Line id="pop1[8]: v" quantity="pop1/8/hhcell/v" scale="1mV" color="#5adad1" timeScale="1ms"/>
            <Line id="pop1[9]: v" quantity="pop1/9/hhcell/v" scale="1mV" color="#f543bb" timeScale="1ms"/>
        </Display>

        <OutputFile id="Volts_file__pop0" fileName="SimExample3.pop0.v.dat">
            <OutputColumn id="v_pop0_0_hhcell_v" quantity="pop0/0/hhcell/v"/>
            <OutputColumn id="v_pop0_1_hhcell_v" quantity="pop0/1/hhcell/v"/>
            <OutputColumn id="v_pop0_2_hhcell_v" quantity="pop0/2/hhcell/v"/>
            <OutputColumn id="v_pop0_3_hhcell_v" quantity="pop0/3/hhcell/v"/>
            <OutputColumn id="v_pop0_4_hhcell_v" quantity="pop0/4/hhcell/v"/>
        </OutputFile>

        <OutputFile id="Volts_file__pop1" fileName="SimExample3.pop1.v.dat">
            <OutputColumn id="v_pop1_0_hhcell_v" quantity="pop1/0/hhcell/v"/>
            <OutputColumn id="v_pop1_1_hhcell_v" quantity="pop1/1/hhcell/v"/>
            <OutputColumn id="v_pop1_2_hhcell_v" quantity="pop1/2/hhcell/v"/>
            <OutputColumn id="v_pop1_3_hhcell_v" quantity="pop1/3/hhcell/v"/>
            <OutputColumn id="v_pop1_4_hhcell_v" quantity="pop1/4/hhcell/v"/>
            <OutputColumn id="v_pop1_5_hhcell_v" quantity="pop1/5/hhcell/v"/>
            <OutputColumn id="v_pop1_6_hhcell_v" quantity="pop1/6/hhcell/v"/>
            <OutputColumn id="v_pop1_7_hhcell_v" quantity="pop1/7/hhcell/v"/>
            <OutputColumn id="v_pop1_8_hhcell_v" quantity="pop1/8/hhcell/v"/>
            <OutputColumn id="v_pop1_9_hhcell_v" quantity="pop1/9/hhcell/v"/>
        </OutputFile>

    </Simulation>

</Lems>
